*Heading
** Job name: Job-1 Model name: Model-1
*Preprint, echo=NO, model=NO, history=NO, contact=NO
**
*Node
     1,	0,	0,	5
2,	5,	0,	5
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*Element, type=C3D8R
   1,  182, 1317, 1884,  795,    1,   13,  273,   88
   2, 1317, 1318, 1885, 1884,   13,   14,  274,  273
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*Nset, nset=_PickedSet6, generate
    1,  4961,     1
*Elset, elset=_PickedSet6, generate
    1,  4000,     1
** Region: (Section-1:Picked)
** Section: Section-1
*Solid Section, elset=_PickedSet6, material=Material-1
1.,
**
*Nset, nset=_PickedSet4
    3,    4,    6,    7,   51,   52
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*Elset, elset=_PickedSet4
  291,  292,  293,  294,  295,  296
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*Elset, elset=__PickedSurf5_S1,  generate
 3901,  4000,     1
*Surface, type=ELEMENT, name=_PickedSurf5
__PickedSurf5_S1, S1
*Elset, elset=__PickedSurf8_S5
 3091, 3092, 3093, 3094, 3095, 3096
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*Surface, type=ELEMENT, name=_PickedSurf8
__PickedSurf8_S5, S5
**
** MATERIALS
**
*Material, name=Material-1
*Elastic
200., 0.3
**plastic
**100,0
**300,20
** ----------------------------------------------------------------
**
** STEP: Step-1
**
*Step, name=Step-1
*static
1,1,1e-12,1
**
** BOUNDARY CONDITIONS
**
** Name: BC-1 Type: Displacement/Rotation
*Boundary
_PickedSet4, 1, 1
_PickedSet4, 2, 2
_PickedSet4, 3, 3
**
** LOADS
**
*Dsload
_PickedSurf5, P, 1000
** Name: Load-1   Type: Pressure
**
** OUTPUT REQUESTS
**
*NODE PRINT, FREQ=9999999999
U
*EL PRINT, POSITION=AVERAGED AT NODES, FREQ=9999999999999
S
*Restart, write, frequency=0
**
** FIELD OUTPUT: F-Output-1
**
*Output, field, variable=PRESELECT
**
** HISTORY OUTPUT: H-Output-1
**
*Output, history, variable=PRESELECT
*End Step
