*Heading
** Job name: piston-hex Model name: Model-1
*Preprint, echo=NO, model=NO, history=NO, contact=NO
**
** PARTS
**
*Part, name=Part-1
*Node
      1,           0.,          36.,          60.
      2,          60.,          36.,           0.
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*Element, type=C3D8R
 1,    1,   59,  138,    4,  220, 1178, 1218,  219
 2,   59,   60,  137,  138, 1178, 1179, 1219, 1218
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*Nset, nset=_PickedSet2, internal, generate
     1,  12174,      1
*Elset, elset=_PickedSet2, internal, generate
    1,  9387,     1
*Elset, elset=_Surf-1_S4, internal, generate
 616,  697,    1
*Elset, elset=_Surf-1_S1, internal
  247,  248,  249,  250,  251,  252
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*Elset, elset=_Surf-1_S3, internal
    1,    2,    3,    4,    5,    6
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*Elset, elset=_Surf-1_S2, internal
   42,   43,   44,   45,   46,   47
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*Elset, elset=_Surf-1_S6, internal
  616,  617,  618,  619,  620,  621
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*Elset, elset=_Surf-1_S5, internal
    1,    2,    3,    4,    5,    6
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*Surface, type=ELEMENT, name=Surf-1
_Surf-1_S4, S4
_Surf-1_S1, S1
_Surf-1_S2, S2
_Surf-1_S6, S6
_Surf-1_S3, S3
_Surf-1_S5, S5
** Section: Section-1
*Solid Section, elset=_PickedSet2, material=Material-1
1.,
*End Part
**
**
** ASSEMBLY
**
*Assembly, name=Assembly
**
*Instance, name=Part-1-1, part=Part-1
*End Instance
**
*Nset, nset=_PickedSet11, internal, instance=Part-1-1
    2,    3,    6,    7,    9,   10
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*Elset, elset=_PickedSet11, internal, instance=Part-1-1
   41,   82,   83,   84,   85,   86
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*Nset, nset=_PickedSet12, internal, instance=Part-1-1
    1,    4,    5,    8,   11,   12
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*Elset, elset=_PickedSet12, internal, instance=Part-1-1
    1,   42,  243,  244,  245,  246
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*Nset, nset=_PickedSet13, internal, instance=Part-1-1
   50,   51,   56,   58, 1024, 1025
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*Elset, elset=_PickedSet13, internal, instance=Part-1-1
 7653, 7654, 7655, 7701, 7702, 7704
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*Elset, elset=__PickedSurf10_S5, internal, instance=Part-1-1
  730,  731,  732,  733,  734,  735
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*Surface, type=ELEMENT, name=_PickedSurf10, internal
__PickedSurf10_S5, S5
*Elset, elset=__PickedSurf15_S1, internal, instance=Part-1-1, generate
 1418,  1693,     1
*Surface, type=ELEMENT, name=_PickedSurf15, internal
__PickedSurf15_S1, S1
*End Assembly
**
** MATERIALS
**
*Material, name=Material-1
*Elastic
200000., 0.3
** ----------------------------------------------------------------
**
** STEP: Step-1
**
*Step, name=Step-1
*Static
1., 1., 1e-05, 1.
**
** BOUNDARY CONDITIONS
**
** Name: BC-1 Type: Displacement/Rotation
*Boundary
_PickedSet11, 3, 3
** Name: BC-2 Type: Displacement/Rotation
*Boundary
_PickedSet12, 1, 1
** Name: BC-3 Type: Displacement/Rotation
*Boundary
_PickedSet13, 2, 2
**
** LOADS
**
** Name: Load-1   Type: Pressure
*Dsload
_PickedSurf15, P, 1500.
** Name: Load-2   Type: Pressure
*Dsload
_PickedSurf10, P, 3000.
**
** OUTPUT REQUESTS
**
*EL PRINT, POSITION=AVERAGED AT NODES, FREQ=9999999999999
S
*Restart, write, frequency=0
**
** FIELD OUTPUT: F-Output-1
**
*Output, field, variable=PRESELECT
**
** HISTORY OUTPUT: H-Output-1
**
*Output, history, variable=PRESELECT
*End Step
